*Heading
** Job name: Job-1 Model name: BirdStrike
** Generated by: Abaqus/CAE 2020
*Preprint, echo=NO, model=NO, history=NO, contact=NO
**
** PARTS
**
*Part, name=Aluminium
*Node
      1,        -500.,        -500.,           0.
      2,  -485.074615,        -500.,           0.
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*Element, type=S4R
   1,    1,    2,   70,   69
   2,    2,    3,   71,   70
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*Nset, nset=Set-1, generate
    1,  4624,     1
*Elset, elset=Set-1, generate
    1,  4489,     1
** Section: Al
*Shell Section, elset=Set-1, material=Al
3.5, 5
*End Part
**
*Part, name=Bird
*Node
      1,          80.,           0.,           0.
      2,         -80.,           0.,           0.
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*Element, type=C3D8R
   1,  250,  200,  225,  236, 2242, 2192, 2217, 2228
   2,  182,   13,   12,  194, 2174,  991,  990, 2186
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*Nset, nset=Set-1, generate
    1,  7644,     1
*Elset, elset=Set-1, generate
    1,  6700,     1
*Nset, nset=Bird, generate
    1,  7644,     1
*Elset, elset=Bird, generate
    1,  6700,     1
** Section: water
*Solid Section, elset=Set-1, controls=EC-1, material=water
,
*End Part
**
**
** ASSEMBLY
**
*Assembly, name=Assembly
**
*Instance, name=Aluminium-1, part=Aluminium
*End Instance
**
*Instance, name=Bird-1, part=Bird
          0.,           0.,           7.
          0.,           0.,           7., 1.00000001268805,           0.,           7., 89.9999992730282
*End Instance
**
*Nset, nset=Set-1, instance=Aluminium-1
    1,    2,    3,    4,    5,    6
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*Elset, elset=Set-1, instance=Aluminium-1
    1,    2,    3,    4,    5,    6
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*End Assembly
**
** ELEMENT CONTROLS
**
*Section Controls, name=EC-1, ELEMENT CONVERSION=YES, CONVERSION CRITERION=TIME, KERNEL=CUBIC
1., 1., 1.


1, 0.
**
** MATERIALS
**
*Material, name=Al
*Density
 2.77e-09,
*Elastic
73100., 0.33
*Plastic
170.,   0.
340., 0.01
*Material, name=water
*Density
 9.4e-11,
*Eos, type=USUP
 1.45e+06,0.,0.
*Viscosity
 1e-09,
**
** INTERACTION PROPERTIES
**
*Surface Interaction, name=IntProp-1
*Friction
0.,
**
** BOUNDARY CONDITIONS
**
** Name: BC-1 Type: Symmetry/Antisymmetry/Encastre
*Boundary
Set-1, ENCASTRE
**
** PREDEFINED FIELDS
**
** Name: initial velocity   Type: Velocity
*Initial Conditions, type=VELOCITY
Bird-1.Set-1, 1, 0.
Bird-1.Set-1, 2, 0.
Bird-1.Set-1, 3, -100000.
**
** INTERACTIONS
**
** Interaction: Int-1
*Contact, op=NEW
*Contact Inclusions, ALL EXTERIOR
*Contact Property Assignment
 ,  , IntProp-1
** ----------------------------------------------------------------
**
** STEP: Step-1
**
*Step, name=Step-1, nlgeom=YES
Bird Strike
*Dynamic, Explicit
, 0.01
*Bulk Viscosity
0.06, 1.2
**
** OUTPUT REQUESTS
**
*Restart, write, number interval=1, time marks=NO
**
** FIELD OUTPUT: F-Output-1
**
*Output, field, variable=PRESELECT
**
** HISTORY OUTPUT: H-Output-1
**
*Output, history, variable=PRESELECT
*End Step
